# OpenSim document version 30000
Model subject1_scaled:
  length_units: meters
  force_units: N
  gravity: 0 -9.80665 0
  credits:
    A planar reduced gait model with 10 degrees of freedom and 18 muscles by Ajay Seth. Closely based on Delp S.L., Loan J.P., Hoy M.G., Zajac F.E., Topp E.L., Rosen J.M., Thelen D.G., Anderson F.C., Seth A. Notes: 3D, 23 DOF gait model created by D.G. Thelen, Univ. of Wisconsin-Madison, and Ajay Seth, Frank C. Anderson, and Scott L. Delp, Stanford University. Lower extremity joint defintions based on Delp et al. (1990). Low back joint and anthropometry based on Anderson and Pandy (1999, 2001). Planar knee model of Yamaguchi and Zajac (1989). Seth replaced tibia translation constraints with a CustomJoint for the knee and removed the patella to eliminate all kinematic constraints; insertions of the quadrucepts are handled with moving points in the tibia frame as defined by Delp 1990. Number of muscles was reduced by Anderson to improve simulation speed for demonstrations and is not intended to be used in research. License: Creative Commons (CCBY 3.0). You are free to distribute, remix, tweak, and build upon this work, even commercially, as long as you credit us for the original creation. http://creativecommons.org/licenses/by/3.0/ More Information: http://simtk-confluence.stanford.edu:8080/display/OpenSim/Gait+2392+and+2354+Models
  publications:
    Delp, S.L., Loan, J.P., Hoy, M.G., Zajac, F.E., Topp E.L., Rosen, J.M.: An interactive graphics-based model of the lower extremity to study orthopaedic surgical procedures, IEEE Transactions on Biomedical Engineering, vol. 37, pp. 757-767, 1990. Yamaguchi G.T., Zajac F.E.: A planar model of the knee joint to characterize the knee extensor mechanism." J . Biomech. vol. 22. pp. 1-10. 1989. Anderson F.C., Pandy M.G.: A dynamic optimization solution for vertical jumping in three dimensions. Computer Methods in Biomechanics and Biomedical Engineering 2:201-231, 1999. Anderson F.C., Pandy M.G.: Dynamic optimization of human walking. Journal of Biomechanical Engineering 123:381-390, 2001.
  BodySet:
    Body ground: mass=0 mass_center=(0 0 0) inertia_xx=0 inertia_yy=0 inertia_zz=0
    Body pelvis: mass=9.714334 mass_center=(-0.0682778 0 0) inertia_xx=0.08149288 inertia_yy=0.08149288
        inertia_zz=0.04454276 meshes=(sacrum.vtp pelvis.vtp l_pelvis.vtp)
      CustomJoint ground_pelvis: parent_body=ground location_in_parent=(0 0 0) location=(0 0 0)
        Coordinate pelvis_tilt: motion_type=rotational default_value=0 range=(-1.570796 1.570796) clamped=false
        Coordinate pelvis_list: motion_type=rotational default_value=0 range=(-1.570796 1.570796) clamped=false
            locked=true
        Coordinate pelvis_rot: motion_type=rotational default_value=0 range=(-1.570796 1.570796) clamped=false
            locked=true
        Coordinate pelvis_tx: motion_type=translational default_value=0 range=(-5 5) clamped=false
        Coordinate pelvis_ty: motion_type=translational default_value=0 range=(-1 2) clamped=false
        Coordinate pelvis_tz: motion_type=translational default_value=0 range=(-10 10) clamped=false locked=true
        SpatialTransform:
          TransformAxis rotation1: coordinates=pelvis_tilt axis=(0 0 1) LinearFunction(coefficients=1 0)
          TransformAxis rotation2: coordinates=pelvis_list axis=(1 0 0) LinearFunction(coefficients=1 0)
          TransformAxis rotation3: coordinates=pelvis_rot axis=(0 1 0) LinearFunction(coefficients=1 0)
          TransformAxis translation1: coordinates=pelvis_tx axis=(1 0 0) LinearFunction(coefficients=1 0)
          TransformAxis translation2: coordinates=pelvis_ty axis=(0 1 0) LinearFunction(coefficients=1 0)
          TransformAxis translation3: coordinates=pelvis_tz axis=(0 0 1) LinearFunction(coefficients=1 0)
    Body femur_r: mass=7.672319 mass_center=(0 -0.170467 0) inertia_xx=0.1110555 inertia_yy=0.02911163
        inertia_zz=0.11711 meshes=femur.vtp
      CustomJoint hip_r: parent_body=pelvis location_in_parent=(-0.0682778 -0.0638354 0.08233069) location=(0 0 0)
        Coordinate hip_flexion_r: motion_type=rotational default_value=0 range=(-2.094395 2.094395) clamped=false
        Coordinate hip_adduction_r: motion_type=rotational default_value=0 range=(-2.094395 2.094395) clamped=false
            locked=true
        Coordinate hip_rotation_r: motion_type=rotational default_value=0 range=(-2.094395 2.094395) clamped=false
            locked=true
        SpatialTransform: axes_held_at_zero=(translation1 translation2 translation3)
          TransformAxis rotation1: coordinates=hip_flexion_r axis=(0 0 1) LinearFunction(coefficients=1 0)
          TransformAxis rotation2: coordinates=hip_adduction_r axis=(1 0 0) LinearFunction(coefficients=1 0)
          TransformAxis rotation3: coordinates=hip_rotation_r axis=(0 1 0) LinearFunction(coefficients=1 0)
    Body tibia_r: mass=3.058155 mass_center=(0 -0.180489 0) inertia_xx=0.0388527 inertia_yy=0.003931523
        inertia_zz=0.03939232 meshes=(tibia.vtp fibula.vtp)
      CustomJoint knee_r: parent_body=femur_r location_in_parent=(-0.004512212 -0.3969072 0) location=(0 0 0)
        Coordinate knee_angle_r: motion_type=rotational default_value=0 range=(-2.094395 0.1745329) clamped=false
        SpatialTransform: axes_held_at_zero=(rotation2 rotation3 translation1 translation2 translation3)
          TransformAxis rotation1: coordinates=knee_angle_r axis=(0 0 1) LinearFunction(coefficients=1 0)
    Body talus_r: mass=0.08248564 mass_center=(0 0 0) inertia_xx=0.0006889677 inertia_yy=0.0006889677
        inertia_zz=0.0006889677 meshes=talus.vtp
      PinJoint ankle_r: parent_body=tibia_r location_in_parent=(0 -0.4156948 0) location=(0 0 0)
        Coordinate ankle_angle_r: motion_type=rotational default_value=0 range=(-1.570796 1.570796) clamped=false
    Body calcn_r: mass=1.03107 mass_center=(0.0913924 0.0274177 0) inertia_xx=0.0009645548 inertia_yy=0.002686974
        inertia_zz=0.002824768 meshes=foot.vtp
      WeldJoint subtalar_r: parent_body=talus_r location_in_parent=(-0.04457209 -0.03833913 0.007238281)
          location=(0 0 0)
    Body toes_r: mass=0.1786639 mass_center=(0.0316218 0.00548355 -0.0159937) inertia_xx=6.889677e-5
        inertia_yy=0.0001377935 inertia_zz=6.889677e-5 meshes=bofoot.vtp
      WeldJoint mtp_r: parent_body=calcn_r location_in_parent=(0.1634097 -0.001827849 0.0009870383) location=(0 0 0)
    Body femur_l: mass=7.672319 mass_center=(0 -0.170467 0) inertia_xx=0.1110555 inertia_yy=0.02911163
        inertia_zz=0.11711 meshes=l_femur.vtp
      CustomJoint hip_l: parent_body=pelvis location_in_parent=(-0.0682778 -0.0638354 -0.08233069) location=(0 0 0)
        Coordinate hip_flexion_l: motion_type=rotational default_value=0 range=(-2.094395 2.094395) clamped=false
        Coordinate hip_adduction_l: motion_type=rotational default_value=0 range=(-2.094395 2.094395) clamped=false
            locked=true
        Coordinate hip_rotation_l: motion_type=rotational default_value=0 range=(-2.094395 2.094395) clamped=false
            locked=true
        SpatialTransform: axes_held_at_zero=(translation1 translation2 translation3)
          TransformAxis rotation1: coordinates=hip_flexion_l axis=(0 0 1) LinearFunction(coefficients=1 0)
          TransformAxis rotation2: coordinates=hip_adduction_l axis=(-1 0 0) LinearFunction(coefficients=1 0)
          TransformAxis rotation3: coordinates=hip_rotation_l axis=(0 -1 0) LinearFunction(coefficients=1 0)
    Body tibia_l: mass=3.058155 mass_center=(0 -0.180489 0) inertia_xx=0.0388527 inertia_yy=0.003931523
        inertia_zz=0.03939232 meshes=(l_tibia.vtp l_fibula.vtp)
      CustomJoint knee_l: parent_body=femur_l location_in_parent=(-0.004512212 -0.3969072 0) location=(0 0 0)
        Coordinate knee_angle_l: motion_type=rotational default_value=0 range=(-2.094395 0.1745329) clamped=false
        SpatialTransform: axes_held_at_zero=(rotation2 rotation3 translation1 translation2 translation3)
          TransformAxis rotation1: coordinates=knee_angle_l axis=(0 0 1) LinearFunction(coefficients=1 0)
    Body talus_l: mass=0.08248564 mass_center=(0 0 0) inertia_xx=0.0006889677 inertia_yy=0.0006889677
        inertia_zz=0.0006889677 meshes=l_talus.vtp
      PinJoint ankle_l: parent_body=tibia_l location_in_parent=(0 -0.4156948 0) location=(0 0 0)
        Coordinate ankle_angle_l: motion_type=rotational default_value=0 range=(-1.047198 1.047198) clamped=false
    Body calcn_l: mass=1.03107 mass_center=(0.0913924 0.0274177 0) inertia_xx=0.0009645548 inertia_yy=0.002686974
        inertia_zz=0.002824768 meshes=l_foot.vtp
      WeldJoint subtalar_l: parent_body=talus_l location_in_parent=(-0.04457209 -0.03833913 -0.007238281)
          location=(0 0 0)
    Body toes_l: mass=0.1786639 mass_center=(0.0316218 0.00548355 0.0159937) inertia_xx=6.889677e-5
        inertia_yy=0.0001377935 inertia_zz=6.889677e-5 meshes=l_bofoot.vtp
      WeldJoint mtp_l: parent_body=calcn_l location_in_parent=(0.1634097 -0.001827849 -0.0009870383) location=(0 0 0)
    Body torso: mass=28.24028 mass_center=(-0.0289722 0.309037 0) inertia_xx=1.140436 inertia_yy=0.5934009
        inertia_zz=1.140436 meshes=(hat_spine.vtp hat_jaw.vtp hat_skull.vtp hat_ribs.vtp)
      PinJoint back: parent_body=pelvis location_in_parent=(-0.09724999 0.07870779 0) location=(0 0 0)
        Coordinate lumbar_extension: motion_type=rotational default_value=0 range=(-1.570796 1.570796) clamped=false
  ForceSet:
    Millard2012EquilibriumMuscle [values shared by the 18 below unless stated]: min_control=0 max_control=1
        optimal_force=1 max_contraction_velocity=10 activation_time_constant=0.01 [seconds]
        deactivation_time_constant=0.04 [seconds] minimum_activation=0.01
      ActiveForceLengthCurve: minimum_value=0
      ForceVelocityCurve: concentric_slope_at_vmax=0 concentric_slope_near_vmax=0.25 isometric_slope=5
          eccentric_slope_at_vmax=0 eccentric_slope_near_vmax=0.15 max_eccentric_velocity_force_multiplier=1.4
      FiberForceLengthCurve
      TendonForceLengthCurve
    Millard2012EquilibriumMuscle hamstrings_r: max_isometric_force=2700 optimal_fiber_length=0.1090593
        tendon_slack_length=0.3261773 pennation_angle_at_optimal=0 [radians]
      PathPoint bifemlh_r-P1: pelvis (-0.121645 -0.0990559 0.0684676)
      PathPoint bifemlh_r-P2: tibia_r (-0.0290986 -0.0348024 0.0284509)
      PathPoint bifemlh_r-P3: tibia_r (-0.0226215 -0.054427 0.0331589)
    Millard2012EquilibriumMuscle bifemsh_r: max_isometric_force=804 optimal_fiber_length=0.1718723
        tendon_slack_length=0.08841986 pennation_angle_at_optimal=0.4014257
      PathPoint P1: femur_r (0.00501373 -0.211679 0.0234642)
      PathPoint P2: tibia_r (-0.0290986 -0.0348024 0.0284509)
      PathPoint P3: tibia_r (-0.0226215 -0.054427 0.0331589)
    Millard2012EquilibriumMuscle glut_max_r: max_isometric_force=1944 optimal_fiber_length=0.1547784
        tendon_slack_length=0.07230884 pennation_angle_at_optimal=0
      PathPoint P1: pelvis (-0.127188 0.00840194 0.045553)
      PathPoint P2: pelvis (-0.129795 -0.0588136 0.0801615)
      PathPoint P3: femur_r (-0.0451235 -0.0585603 0.0252692)
      PathPoint P4: femur_r (-0.0156428 -0.101879 0.042015)
    Millard2012EquilibriumMuscle iliopsoas_r: max_isometric_force=2342 optimal_fiber_length=0.09749959
        tendon_slack_length=0.1559993 pennation_angle_at_optimal=0.1396263
      PathPoint psoas_r-P1: pelvis (-0.0624834 0.0856611 0.0284953)
      PathPoint psoas_r-P2: pelvis (-0.0229846 -0.0550472 0.0748371)
      ConditionalPathPoint psoas_r-P3: pelvis (-0.0278133 -0.077742 0.0804573) range=(-1.5708 0.785398)
          coordinate=hip_flexion_r
      PathPoint psoas_r-P4: femur_r (0.00160439 -0.0508392 0.00381043)
      PathPoint psoas_r-P5: femur_r (-0.0188516 -0.0598639 0.0104285)
    Millard2012EquilibriumMuscle rect_fem_r: max_isometric_force=1169 optimal_fiber_length=0.1141544
        tendon_slack_length=0.3104199 pennation_angle_at_optimal=0.08726646
      PathPoint P1: pelvis (-0.0284893 -0.0300345 0.0954444)
      ConditionalPathPoint P2: femur_r (0.0334917 -0.404106 0.00190522) range=(-2.61799 -1.45997)
          coordinate=knee_angle_r
      MovingPathPoint P3: tibia_r (0.0597031 0.0202859 0.00135343) x_coordinate=knee_angle_r y_coordinate=knee_angle_r
          z_coordinate=knee_angle_r
        x_location: MultiplierFunction: scale=0.9667322
          SimmSpline: x=(-2.0944 -1.99997 -1.5708 -1.45752 -1.39626 -1.0472 -0.698132 -0.526391 -0.349066 -0.174533 0 0.00017453 0.00034907 0.0279253 0.0872665 0.174533 2.0944)
              y=(0.0155805 0.0179938 0.0275081 0.0296564 0.0307615 0.0365695 0.0422074 0.0450902 0.048391 0.0534299 0.0617576 0.0617669 0.0617762 0.0633083 0.066994 0.0733035 0.0573481)
        y_location: MultiplierFunction: scale=0.9667322
          SimmSpline: x=(-2.0944 -1.99997 -1.5708 -1.45752 -1.39626 -1.0472 -0.698132 -0.526391 -0.349066 -0.174533 0 0.00017453 0.00034907 0.0279253 0.0872665 0.174533 2.0944)
              y=(0.0234116 0.0237613 0.0251141 0.0252795 0.0253146 0.0249184 0.0242373 0.0238447 0.0234197 0.0227644 0.020984 0.0209814 0.0209788 0.0205225 0.0191754 0.0159554 -0.0673774)
        z_location: MultiplierFunction: scale=0.9667322
          SimmSpline: x=(-2.0944 0.1745) y=(0.0014 0.0014)
    Millard2012EquilibriumMuscle vasti_r: max_isometric_force=5000 optimal_fiber_length=0.1077088
        tendon_slack_length=0.1167684 pennation_angle_at_optimal=0.05235988
      PathPoint vas_int_r-P1: femur_r (0.0290796 -0.192928 0.0310851)
      PathPoint vas_int_r-P2: femur_r (0.033592 -0.208972 0.0285782)
      ConditionalPathPoint vas_int_r-P3: femur_r (0.0343942 -0.404106 0.0055151) range=(-2.61799 -1.42)
          coordinate=knee_angle_r
      MovingPathPoint vas_int_r-P4: tibia_r (0.0536181 0.0244509 0.00174012) x_coordinate=knee_angle_r
          y_coordinate=knee_angle_r z_coordinate=knee_angle_r
        x_location: MultiplierFunction: scale=0.9667322
          SimmSpline: x=(-2.0944 -1.99997 -1.5708 -1.45752 -1.39626 -1.0472 -0.698132 -0.526391 -0.349066 -0.174533 0 0.00017453 0.00034907 0.0279253 0.0872665 0.174533 2.0944)
              y=(0.0082733 0.0106866 0.0202042 0.022353 0.0234583 0.0292715 0.0349465 0.037871 0.0412569 0.0465287 0.0554632 0.0554735 0.0554837 0.0571717 0.061272 0.0684368 0.0648818)
        y_location: MultiplierFunction: scale=0.9667322
          SimmSpline: x=(-2.0944 -1.99997 -1.5708 -1.45752 -1.39626 -1.0472 -0.698132 -0.526391 -0.349066 -0.174533 0 0.00017453 0.00034907 0.0279253 0.0872665 0.174533 2.0944)
              y=(0.025599 0.0259487 0.0273124 0.0274796 0.0275151 0.0271363 0.0265737 0.0263073 0.0261187 0.0260129 0.0252923 0.0252911 0.0252898 0.0250526 0.0242191 0.0218288 -0.0685706)
        z_location: MultiplierFunction: scale=0.9667322
          SimmSpline: x=(-2.0944 2.0944) y=(0.0018 0.0018)
    Millard2012EquilibriumMuscle gastroc_r: max_isometric_force=2500 optimal_fiber_length=0.08692608
        tendon_slack_length=0.3477043 pennation_angle_at_optimal=0.296706
      PathPoint med_gas_r-P1: femur_r (-0.0190522 -0.393979 -0.0235645)
      ConditionalPathPoint med_gas_r-P2: femur_r (-0.0300824 -0.403304 -0.0258708) range=(-0.785398 0.174533)
          coordinate=knee_angle_r
      PathPoint med_gas_r-P3: calcn_r (0 0.0283317 -0.0048438)
    Millard2012EquilibriumMuscle soleus_r: max_isometric_force=5137 optimal_fiber_length=0.04817055
        tendon_slack_length=0.2408528 pennation_angle_at_optimal=0.4363323
      PathPoint P1: tibia_r (-0.00232016 -0.1482 0.0068638)
      PathPoint P2: calcn_r (0 0.0283317 -0.0048438)
    Millard2012EquilibriumMuscle tib_ant_r: max_isometric_force=3000 optimal_fiber_length=0.09378992
        tendon_slack_length=0.2134199 pennation_angle_at_optimal=0.08726646
      PathPoint P1: tibia_r (0.0173045 -0.156997 0.0111174)
      PathPoint P2: tibia_r (0.0318055 -0.381956 -0.0171112)
      PathPoint P3: calcn_r (0.106564 0.0162679 -0.0278747)
    Millard2012EquilibriumMuscle hamstrings_l: max_isometric_force=2700 optimal_fiber_length=0.1090593
        tendon_slack_length=0.3261773 pennation_angle_at_optimal=0
      PathPoint bifemlh_l-P1: pelvis (-0.121645 -0.0990559 -0.0684676)
      PathPoint bifemlh_l-P2: tibia_l (-0.0290986 -0.0348024 -0.0284509)
      PathPoint bifemlh_l-P3: tibia_l (-0.0226215 -0.054427 -0.0331589)
    Millard2012EquilibriumMuscle bifemsh_l: max_isometric_force=804 optimal_fiber_length=0.1718723
        tendon_slack_length=0.08841986 pennation_angle_at_optimal=0.4014257
      PathPoint P1: femur_l (0.00501373 -0.211679 -0.0234642)
      PathPoint P2: tibia_l (-0.0290986 -0.0348024 -0.0284509)
      PathPoint P3: tibia_l (-0.0226215 -0.054427 -0.0331589)
    Millard2012EquilibriumMuscle glut_max_l: max_isometric_force=1944 optimal_fiber_length=0.1547784
        tendon_slack_length=0.07230884 pennation_angle_at_optimal=0
      PathPoint P1: pelvis (-0.127188 0.00840194 -0.045553)
      PathPoint P2: pelvis (-0.129795 -0.0588136 -0.0801615)
      PathPoint P3: femur_l (-0.0451235 -0.0585603 -0.0252692)
      PathPoint P4: femur_l (-0.0156428 -0.101879 -0.042015)
    Millard2012EquilibriumMuscle iliopsoas_l: max_isometric_force=2342 optimal_fiber_length=0.09749959
        tendon_slack_length=0.1559993 pennation_angle_at_optimal=0.1396263
      PathPoint psoas_l-P1: pelvis (-0.0624834 0.0856611 -0.0284953)
      PathPoint psoas_l-P2: pelvis (-0.0229846 -0.0550472 -0.0748371)
      ConditionalPathPoint psoas_l-P3: pelvis (-0.0278133 -0.077742 -0.0804573) range=(-1.5708 0.785398)
          coordinate=hip_flexion_l
      PathPoint psoas_l-P4: femur_l (0.00160439 -0.0508392 -0.00381043)
      PathPoint psoas_l-P5: femur_l (-0.0188516 -0.0598639 -0.0104285)
    Millard2012EquilibriumMuscle rect_fem_l: max_isometric_force=1169 optimal_fiber_length=0.1141544
        tendon_slack_length=0.3104199 pennation_angle_at_optimal=0.08726646
      PathPoint P1: pelvis (-0.0284893 -0.0300345 -0.0954444)
      ConditionalPathPoint P2: femur_l (0.0334917 -0.404106 -0.00190522) range=(-2.61799 -1.45997)
          coordinate=knee_angle_l
      MovingPathPoint P3: tibia_l (0.0597031 0.0202859 -0.00135343) x_coordinate=knee_angle_l y_coordinate=knee_angle_l
          z_coordinate=knee_angle_l
        x_location: MultiplierFunction: scale=0.9667322
          SimmSpline: x=(-2.0944 -1.99997 -1.5708 -1.45752 -1.39626 -1.0472 -0.698132 -0.526391 -0.349066 -0.174533 0 0.00017453 0.00034907 0.0279253 0.0872665 0.174533 2.0944)
              y=(0.0155805 0.0179938 0.0275081 0.0296564 0.0307615 0.0365695 0.0422074 0.0450902 0.048391 0.0534299 0.0617576 0.0617669 0.0617762 0.0633083 0.066994 0.0733035 0.0573481)
        y_location: MultiplierFunction: scale=0.9667322
          SimmSpline: x=(-2.0944 -1.99997 -1.5708 -1.45752 -1.39626 -1.0472 -0.698132 -0.526391 -0.349066 -0.174533 0 0.00017453 0.00034907 0.0279253 0.0872665 0.174533 2.0944)
              y=(0.0234116 0.0237613 0.0251141 0.0252795 0.0253146 0.0249184 0.0242373 0.0238447 0.0234197 0.0227644 0.020984 0.0209814 0.0209788 0.0205225 0.0191754 0.0159554 -0.0673774)
        z_location: MultiplierFunction: scale=0.9667322
          SimmSpline: x=(-2.0944 0.1745) y=(-0.0014 -0.0014)
    Millard2012EquilibriumMuscle vasti_l: max_isometric_force=5000 optimal_fiber_length=0.1077088
        tendon_slack_length=0.1167684 pennation_angle_at_optimal=0.05235988
      PathPoint vas_int_l-P1: femur_l (0.0290796 -0.192928 -0.0310851)
      PathPoint vas_int_l-P2: femur_l (0.033592 -0.208972 -0.0285782)
      ConditionalPathPoint vas_int_l-P3: femur_l (0.0343942 -0.404106 -0.0055151) range=(-2.61799 -1.42)
          coordinate=knee_angle_l
      MovingPathPoint vas_int_l-P4: tibia_l (0.0536181 0.0244509 -0.00174012) x_coordinate=knee_angle_l
          y_coordinate=knee_angle_l z_coordinate=knee_angle_l
        x_location: MultiplierFunction: scale=0.9667322
          SimmSpline: x=(-2.0944 -1.99997 -1.5708 -1.45752 -1.39626 -1.0472 -0.698132 -0.526391 -0.349066 -0.174533 0 0.00017453 0.00034907 0.0279253 0.0872665 0.174533 2.0944)
              y=(0.0082733 0.0106866 0.0202042 0.022353 0.0234583 0.0292715 0.0349465 0.037871 0.0412569 0.0465287 0.0554632 0.0554735 0.0554837 0.0571717 0.061272 0.0684368 0.0648818)
        y_location: MultiplierFunction: scale=0.9667322
          SimmSpline: x=(-2.0944 -1.99997 -1.5708 -1.45752 -1.39626 -1.0472 -0.698132 -0.526391 -0.349066 -0.174533 0 0.00017453 0.00034907 0.0279253 0.0872665 0.174533 2.0944)
              y=(0.025599 0.0259487 0.0273124 0.0274796 0.0275151 0.0271363 0.0265737 0.0263073 0.0261187 0.0260129 0.0252923 0.0252911 0.0252898 0.0250526 0.0242191 0.0218288 -0.0685706)
        z_location: MultiplierFunction: scale=0.9667322
          SimmSpline: x=(-2.0944 2.0944) y=(-0.0018 -0.0018)
    Millard2012EquilibriumMuscle gastroc_l: max_isometric_force=2500 optimal_fiber_length=0.08692608
        tendon_slack_length=0.3477043 pennation_angle_at_optimal=0.296706
      PathPoint med_gas_l-P1: femur_l (-0.0190522 -0.393979 0.0235645)
      ConditionalPathPoint med_gas_l-P2: femur_l (-0.0300824 -0.403304 0.0258708) range=(-0.785398 0.174533)
          coordinate=knee_angle_l
      PathPoint med_gas_l-P3: calcn_l (0 0.0283317 0.0048438)
    Millard2012EquilibriumMuscle soleus_l: max_isometric_force=5137 optimal_fiber_length=0.04817055
        tendon_slack_length=0.2408528 pennation_angle_at_optimal=0.4363323
      PathPoint P1: tibia_l (-0.00232016 -0.1482 -0.0068638)
      PathPoint P2: calcn_l (0 0.0283317 0.0048438)
    Millard2012EquilibriumMuscle tib_ant_l: max_isometric_force=3000 optimal_fiber_length=0.09378992
        tendon_slack_length=0.2134199 pennation_angle_at_optimal=0.08726646
      PathPoint P1: tibia_l (0.0173045 -0.156997 -0.0111174)
      PathPoint P2: tibia_l (0.0318055 -0.381956 0.0171112)
      PathPoint P3: calcn_l (0.106564 0.0162679 0.0278747)
  MarkerSet:
    Marker RASI: pelvis (0.0104245 0.0166287 0.127508)
    Marker LASI: pelvis (0.0117025 0.0118709 -0.128803)
    Marker CLAV: torso (0.0797793 0.356631 -0.00523747)
    Marker RKNE: femur_r (0.00114981 -0.41624 0.0546403)
    Marker RKNE_med: femur_r (-0.0540463 -0.435732 -0.0479184)
    Marker RTHI1: femur_r (0.0685443 -0.113928 0.108746)
    Marker RTHI2: femur_r (0.00781877 -0.117323 0.13399)
    Marker RTHI3: femur_r (0.0412737 -0.163221 0.119012)
    Marker RANK: tibia_r (-0.00228978 -0.413187 0.0522365)
    Marker RANK_med: tibia_r (0.00401913 -0.39398 -0.0305501)
    Marker RTIB1: tibia_r (0.0147186 -0.195969 0.0738417)
    Marker RTIB2: tibia_r (-0.0558005 -0.209548 0.0885508)
    Marker RTIB3: tibia_r (-0.0111452 -0.244808 0.0800902)
    Marker LKNE: femur_l (0.000126257 -0.41147 -0.0531923)
    Marker LKNE_med: femur_l (-0.00778079 -0.416964 0.041185)
    Marker LTHI1: femur_l (0.0961789 -0.198356 -0.0525264)
    Marker LTHI2: femur_l (0.0500108 -0.195845 -0.104726)
    Marker LTHI3: femur_l (0.0708927 -0.247672 -0.0781309)
    Marker LANK: tibia_l (-0.000818178 -0.40706 -0.0529411)
    Marker LANK_med: tibia_l (-0.00027568 -0.394741 0.0322345)
    Marker LTIB1: tibia_l (0.0188099 -0.206193 -0.0582216)
    Marker LTIB2: tibia_l (-0.0440313 -0.212839 -0.0802053)
    Marker LTIB3: tibia_l (-0.0049048 -0.256335 -0.070013)
    Marker RPSI: pelvis (-0.162604 0.035196 0.0243916)
    Marker LPSI: pelvis (-0.161906 0.0403227 -0.0238171)
    Marker Foot_r1: calcn_r (-0.00250222 0.0314632 0.0102836)
    Marker Foot_r4: calcn_r (0.0926071 0.00409388 0.0466703)
    Marker Foot_r6: calcn_r (0.196743 0.0230351 0.0145037)
    Marker Foot_r7: toes_r (0.0627106 0.0226233 -0.0281887)
    Marker foot_l1: calcn_l (-0.00969246 0.0236537 -0.00312849)
    Marker foot_l4: calcn_l (0.0903599 0.00717619 -0.0479853)
    Marker foot_l6: calcn_l (0.189406 0.0213243 -0.0197242)
    Marker foot_l7: toes_l (0.0583139 0.0201824 0.0171885)
